# OpenSim document version 30000
MarkerSet:
  Marker D2D: LA7D2 (0.00121083 -0.00470178 -0.00817342)
  Marker D2I: LA6M2 (0.000292869 -0.00509739 -0.00775478)
  Marker D2P: LA5P2 (0.00126676 -0.0153852 -0.0152447)
  Marker D3D: LA7D3 (-0.000648875 -0.00609758 -0.00989081)
  Marker D3I: LA6M3 (-0.00206066 -0.0106967 -0.0108721)
  Marker D3P: LA5P3 (-0.00360336 -0.0187179 -0.0160623)
  Marker D4P: LA5P4 (-0.00772855 -0.0189967 -0.0115102) fixed=true
  Marker D4I: LA6M4 (-0.00637165 -0.0129548 -0.0112954)
  Marker D4D: LA7D4 (-0.00601137 -0.00802064 -0.0101013)
  Marker D5P: LA5P5 (-0.0101363 -0.0174918 -0.0081413)
  Marker D5I: LA6M5 (-0.00949195 -0.0106098 -0.00796306)
  Marker D5D: LA7D5 (-0.00838594 -0.00863086 -0.00771141)
  Marker D1P: LA5P1 (0.00906631 -0.00434237 0.00126597)
  Marker D1D: LA6D1 (0.00669108 -0.00113153 -0.000125174)
  Marker D1H: LA4M1 (0.0149289 -0.00830449 0.00332567)
  Marker D2H: LA4M2 (0.00146741 -0.00738783 -0.0121883)
  Marker D3H: LA4M3 (-0.0020906 -0.00801564 -0.0111827)
  Marker D4H: LA4M4 (-0.00657609 -0.00723419 -0.00973516)
  Marker D5H: LA4M5 (-0.00859257 -0.00815796 -0.00808664)
  Marker HC: LA4M3 (-0.00217265 0.0115184 -0.0117452)
  Marker HM: LA4M2 (-0.00173754 0.0268452 -0.0116257)
  Marker HL: LA4M4 (-0.00692357 0.0321725 -0.0102104)
  Marker WrM: LA2R (0.0123848 -0.107014 -0.023763)
  Marker WrL: LA2R (-0.00181718 -0.107906 -0.0233731)
  Marker WrC: LA2R (0.0056306 -0.0955486 -0.0207052)
  Marker ArmM: LA2U (0.00191959 -0.0140361 -0.021595)
  Marker ArmL: LA2U (-0.00996767 -0.00854712 -0.0177573)
  Marker ArmC: LA2U (-0.00797829 -0.0240175 -0.0196133)
  Marker BicM: LA1H (-0.00272757 -0.191983 -0.0253611)
  Marker BicL: LA1H (-0.00771521 -0.21242 -0.019601)
  Marker BicC: LA1H (-0.0228256 -0.19567 -0.0244244)
