# OpenSim document version 40000
Model LeftArmAndHand:
  gravity: 0 -9.80665 0
  credits: Sobinov A., Goodman J., Hardesty R., et al.
  length_units: meters
  force_units: N
  publications:
    https://github.com/nishbo/ms_arm_and_hand
    Menegolo Andrea, https://simtk.org/projects/ulb_project
    Delp SL, Anderson FC, Arnold AS, Loan P, Habib A, John CT, Guendelman E, Thelen DG (in press). OpenSim: Open-source Software to Create and Analyze Dynamic Simulations of Movement. IEEE Transactions on Biomedical Engineering. (2007)
    Holzbaur KR, Murray WM, Delp SL.: A model of the upper extremity for simulating musculoskeletal surgery and analyzing neuromuscular control., Ann Biomed Eng. 2005 Jun;33(6):829-40. (2005)
  Ground
  BodySet:
    Body Thorax: mass=0 [kg] mass_center=(0 0 0) inertia=(0 0 0 0 0 0) meshes=thorax.vtp
      WrapEllipsoid RA_Thorax: xyz_body_rotation=(0.0434587 -0.3319616 0.1898918) translation=(-0.0386 -0.1273 0.0709)
          quadrant=all dimensions=(0.1 0.135 0.08)
      WrapEllipsoid LA_Thorax: xyz_body_rotation=(-0.0434587 0.3319616 0.1898918) translation=(-0.0386 -0.1273 -0.0709)
          quadrant=all dimensions=(0.1 0.135 0.08)
    Body LA_clavicle: mass=0 mass_center=(0 0 0) inertia=(0 0 0 0 0 0) meshes=clavicle_l.vtp
    Body LA_clavphant: mass=0 mass_center=(0 0 0) inertia=(0 0 0 0 0 0)
    Body LA_scapula: mass=0 mass_center=(0 0 0) inertia=(0 0 0 0 0 0) meshes=scapula_l.vtp
      WrapEllipsoid LA_Deltoid2: active=false xyz_body_rotation=(-3.130423 1.548805 -1.314233)
          translation=(-0.0058 -0.0378 -0.0096) quadrant=-y dimensions=(0.03 0.04 0.035)
      WrapTorus LA_Delt3: active=false xyz_body_rotation=(-0.6209881 -0.32882 -0.5607743)
          translation=(-0.0973 -0.0428 0.037) quadrant=all inner_radius=0.04 outer_radius=0.06
      WrapTorus LA_INFSP: xyz_body_rotation=(-0.02530727 -0.5883505 0.1518436) translation=(-0.0561 -0.0199 0.0112)
          quadrant=all inner_radius=0.008 outer_radius=0.019
      WrapEllipsoid LA_TMIN: xyz_body_rotation=(2.097537 0.2808235 -1.763481) translation=(-0.0418 -0.0519 0.0359)
          quadrant=x dimensions=(0.03 0.03 0.05)
      WrapCylinder LA_TRIlongglen: xyz_body_rotation=(-1.375319 0.2946116 2.435956)
          translation=(-0.0359 -0.0309 0.0132) quadrant=x radius=0.003 length=0.03
    Body LA_scapphant: mass=0 mass_center=(0 0 0) inertia=(0 0 0 0 0 0)
    Body LA1H_PHANT: mass=0 mass_center=(0 0 0) inertia=(0 0 0 0 0 0)
    Body LA1H_PHANT1: mass=0 mass_center=(0 0 0) inertia=(0 0 0 0 0 0)
    Body LA1H: mass=0 mass_center=(0 0 0) inertia=(0 0 0 0 0 0) meshes=humerus_l.vtp
      WrapEllipsoid LA_DELT1hh: xyz_body_rotation=(-0.05846853 -1.004612 0.5703736)
          translation=(-0.0139 -0.0127 0.0262) quadrant=-z dimensions=(0.03 0.1 0.05)
      WrapCylinder LA_delt2hum: xyz_body_rotation=(-1.680927 0.02495821 0.05166175)
          translation=(0.0017 -0.0958 -0.0011) quadrant=all radius=0.0094 length=0.05
      WrapEllipsoid LA_delt3hum: xyz_body_rotation=(-1.727352 -0.07592182 -2.743134)
          translation=(0.0019 -0.0592 -0.0011) quadrant=x dimensions=(0.01 0.01 0.05)
      WrapEllipsoid LA_SUPSP: xyz_body_rotation=(-0.03804818 -0.00855211 -1.306728) translation=(0.0002 0.0077 -0.0043)
          quadrant=all dimensions=(0.02 0.02 0.02)
      WrapEllipsoid LA_INFSP_and_TMIN_hum_head: xyz_body_rotation=(0.2865831 0.00907571 -0.06841691)
          translation=(-0.0003 0.0026 -0.0038) quadrant=all dimensions=(0.02 0.025 0.02)
      WrapEllipsoid LA_SUBSCAP: xyz_body_rotation=(0.9245009 -0.288852 0.381529) translation=(-0.0025 0.0007 0.0045)
          quadrant=all dimensions=(0.02 0.017 0.028)
      WrapCylinder LA_TMINhum: xyz_body_rotation=(-1.753532 -0.06928957 2.746276) translation=(-0.0014 -0.0455 0)
          quadrant=x radius=0.007 length=0.07
      WrapSphere LA_TMAJ_LAT_PEC_CORBhh: translation=(0.0007 0 -0.006) quadrant=all radius=0.03
      WrapCylinder LA_TMAJ_LAThum: xyz_body_rotation=(-1.536413 0.06370452 1.41424) translation=(0.0007 -0.0443 0.0055)
          quadrant=-x radius=0.007 length=0.04
      WrapEllipsoid LA_PEC1hh: xyz_body_rotation=(0.6204646 0.3104941 0.3637266) translation=(-0.0037 0.0005 0.0025)
          quadrant=z dimensions=(0.03 0.02 0.02)
      WrapCylinder LA_PEC12hum: xyz_body_rotation=(-1.559277 0.07749262 -0.9258972) translation=(0.002 -0.0508 0.0017)
          quadrant=x radius=0.009 length=0.07
      WrapSphere LA_PEC23hh: translation=(-0.0086 0.0021 0.0004) quadrant=all radius=0.02
      WrapCylinder LA_PEC3hum: xyz_body_rotation=(-1.440944 0.0561996 1.751961) translation=(0.0009 -0.0551 0.0004)
          quadrant=-x radius=0.008 length=0.07
      WrapCylinder LA_LAT_TMAJhh: xyz_body_rotation=(0.3050835 0.01832596 -0.6866125)
          translation=(-0.0224 0.0102 -0.0094) quadrant=-y radius=0.007 length=0.045
      WrapSphere LA_LAT_TMAJ2hh: xyz_body_rotation=(0.1272345 -0.2761111 0.01972222)
          translation=(-0.0016 0.0092 -0.0052) quadrant=z radius=0.03
      WrapCylinder LA_CORBhum: xyz_body_rotation=(1.608321 -0.09599311 0.8752826) translation=(0.0027 -0.1202 0.0059)
          quadrant=x radius=0.008 length=0.05
      WrapEllipsoid LA_TRIlonghh: xyz_body_rotation=(-3.001617 0.853466 2.574186) translation=(-0.0078 -0.0041 0.0014)
          quadrant=-z dimensions=(0.035 0.02 0.02)
      WrapCylinder LA_TRI: xyz_body_rotation=(0.1401499 0.00628319 0.1549852) translation=(0.0028 -0.2919 0.0119)
          quadrant=all radius=0.016 length=0.04
      WrapEllipsoid LA_ANC: xyz_body_rotation=(-0.00750492 0.1966986 1.049292) translation=(0.0134 -0.2861 0.0008)
          quadrant=-x dimensions=(0.02 0.02 0.02)
      WrapEllipsoid LA_BIClong: xyz_body_rotation=(2.004336 1.001644 0.9754645) translation=(0.0033 0.0073 -0.0003)
          quadrant=-y dimensions=(0.025 0.02 0.02)
      WrapEllipsoid LA_Elbow_BIC_BRD: xyz_body_rotation=(0.1286308 -0.1375319 0.03071779)
          translation=(0.0019 -0.289 0.014) quadrant=x dimensions=(0.015 0.015 0.1)
      WrapEllipsoid LA_Elbow_PT_ECRL: xyz_body_rotation=(0.1610939 0.1108284 0.6145304)
          translation=(0.003 -0.2872 0.0069) quadrant=x dimensions=(0.018 0.025 0.035)
    Body LA2U: mass=0 mass_center=(0 0 0) inertia=(0 0 0 0 0 0) meshes=ulna_l.vtp
      WrapCylinder LA_PQ2: xyz_body_rotation=(-1.391376 -0.06894051 1.522451) translation=(-0.0012 -0.2092 -0.0428)
          quadrant=all radius=0.007 length=0.01
    Body LA2R: mass=0 mass_center=(0 0 0) inertia=(0 0 0 0 0 0) meshes=radius_l.vtp
      WrapCylinder LA_SUP: xyz_body_rotation=(-1.447751 -0.3040364 -2.441017) translation=(0.0045 -0.0437 -0.0059)
          quadrant=-x radius=0.008 length=0.04
      WrapTorus LA_ECU: xyz_body_rotation=(0.9866346 0.1488766 0.222704) translation=(-0.0163 -0.2417 -0.0349)
          quadrant=all inner_radius=0.006 outer_radius=0.009
      WrapCylinder LA_PQ1: xyz_body_rotation=(1.607623 0.0127409 -2.690251) translation=(0.0281 -0.1986 -0.0288)
          quadrant=all radius=0.01 length=0.01
    Body LA3L: mass=0 mass_center=(0 0 0) inertia=(0 0 0 0 0 0) meshes=lunate_l.vtp
      WrapEllipsoid LA_Extensor_ellipse: xyz_body_rotation=(0.2508038 -0.2855359 0.2328269)
          translation=(0.0007 -0.0135 -0.0047) quadrant=-z dimensions=(0.05 0.02 0.013)
      WrapTorus LA_ECRL: xyz_body_rotation=(-1.538333 -0.2343977 0.7311184) translation=(0.0222 -0.0096 -0.0208)
          quadrant=all inner_radius=0.008 outer_radius=0.016
      WrapTorus LA_ECRB: xyz_body_rotation=(-1.312662 0.1178097 -0.1162389) translation=(0.0126 -0.0095 -0.0186)
          quadrant=all inner_radius=0.008 outer_radius=0.01
      WrapTorus LA_FCR: xyz_body_rotation=(1.555961 0.1532399 -0.1000074) translation=(0.0032 -0.0045 0.019)
          quadrant=all inner_radius=0.001 outer_radius=0.0025
      WrapTorus LA_FCU: xyz_body_rotation=(1.573763 0.07976155 0.39235) translation=(-0.0123 -0.0124 0.0171)
          quadrant=all inner_radius=0.0068 outer_radius=0.008
      WrapEllipsoid LA_PL: xyz_body_rotation=(0.03159046 -0.0996583 0.06335545) translation=(0.0057 -0.018 0.0041)
          quadrant=z dimensions=(0.025 0.014 0.012)
      WrapEllipsoid LA_FDS: xyz_body_rotation=(-0.00837758 0.08168141 -0.01710423) translation=(0.0012 -0.0057 0.0003)
          quadrant=z dimensions=(0.025 0.013 0.012)
      WrapEllipsoid LA_FDP: xyz_body_rotation=(1.467473 0.1946042 0.121824) translation=(-0.0022 -0.0069 -0.0032)
          quadrant=y dimensions=(0.025 0.013 0.012)
      WrapTorus LA_ED5: xyz_body_rotation=(-2.363176 -0.1930334 -0.2691298) translation=(-0.0128 -0.0133 -0.0148)
          quadrant=all inner_radius=0.008 outer_radius=0.012
      WrapTorus LA_ED4: xyz_body_rotation=(-1.983916 -0.100531 0.5230752) translation=(-0.0098 -0.0137 -0.0166)
          quadrant=all inner_radius=0.009 outer_radius=0.011
      WrapTorus LA_ED3: xyz_body_rotation=(-1.993166 -0.1979203 0.3682645) translation=(-0.0007 -0.0117 -0.0191)
          quadrant=all inner_radius=0.009 outer_radius=0.012
      WrapTorus LA_ED2: xyz_body_rotation=(-1.697682 -0.08970992 0.00767945) translation=(0.009 -0.0149 -0.0211)
          quadrant=all inner_radius=0.009 outer_radius=0.012
      WrapEllipsoid LA_EDM: xyz_body_rotation=(-2.962696 -0.1593486 0.1179843) translation=(-0.0167 -0.0022 -0.0048)
          quadrant=z dimensions=(0.018 0.014 0.008)
      WrapEllipsoid LA_FPL: xyz_body_rotation=(0.1663299 0.08220501 -0.06597345) translation=(0.017 -0.025 0.0033)
          quadrant=z dimensions=(0.016 0.01 0.01)
    Body LA3S: mass=0 mass_center=(0 0 0) inertia=(0 0 0 0 0 0) meshes=scaphoid_l.vtp
    Body LA3P: mass=0 mass_center=(0 0 0) inertia=(0 0 0 0 0 0) meshes=pisiform_l.vtp
    Body LA3Q: mass=0 mass_center=(0 0 0) inertia=(0 0 0 0 0 0) meshes=triquetrum_l.vtp
    Body LA3C: mass=0 mass_center=(0 0 0) inertia=(0 0 0 0 0 0) meshes=capitate_l.vtp
    Body LA3T: mass=0 mass_center=(0 0 0) inertia=(0 0 0 0 0 0) meshes=trapezium_l.vtp
    Body LA3O: mass=0 mass_center=(0 0 0) inertia=(0 0 0 0 0 0) meshes=trapezoid_l.vtp
    Body LA3H: mass=0 mass_center=(0 0 0) inertia=(0 0 0 0 0 0) meshes=hamate_l.vtp
    Body LA4M1_PHANT: mass=0 mass_center=(0 0 0) inertia=(0 0 0 0 0 0)
      WrapTorus LA_APL: active=false xyz_body_rotation=(1.609892 -0.2478367 -0.0301942)
          translation=(0.0082 0.0023 0.0101) quadrant=all inner_radius=0.004 outer_radius=0.008
    Body LA4M1: mass=0 mass_center=(0 0 0) inertia=(0 0 0 0 0 0) meshes=1mc_l.vtp
      WrapCylinder LA_MPthumb: xyz_body_rotation=(-0.3213151 -0.1101303 -0.834791) translation=(0.0177 -0.0305 0.0143)
          quadrant=all radius=0.0085 length=0.02
    Body LA4M2: mass=0 mass_center=(0 0 0) inertia=(0 0 0 0 0 0) meshes=2mc_l.vtp
      WrapEllipsoid LA_2ndmcp: xyz_body_rotation=(-1.486671 1.296605 2.43072) translation=(0.0059 -0.0304 0.0006)
          quadrant=-x dimensions=(0.005 0.005 0.03)
    Body LA4M3: mass=0 mass_center=(0 0 0) inertia=(0 0 0 0 0 0) meshes=3mc_l.vtp
    Body LA4M4: mass=0 mass_center=(0 0 0) inertia=(0 0 0 0 0 0) meshes=4mc_l.vtp
    Body LA4M5: mass=0 mass_center=(0 0 0) inertia=(0 0 0 0 0 0) meshes=5mc_l.vtp
    Body LA5P1: mass=0 mass_center=(0 0 0) inertia=(0 0 0 0 0 0) meshes=thumbprox_l.vtp
      WrapCylinder LA_IPthumb: xyz_body_rotation=(-0.3047345 -0.01291544 0.08796459)
          translation=(0.0121 -0.0302 0.0096) quadrant=-x radius=0.0045 length=0.01
    Body LA6D1: mass=0 mass_center=(0 0 0) inertia=(0 0 0 0 0 0) meshes=thumbdist_l.vtp
    Body LA5P2: mass=0 mass_center=(0 0 0) inertia=(0 0 0 0 0 0) meshes=2proxph_l.vtp
      WrapCylinder LA_Secondpm: xyz_body_rotation=(-0.7419395 1.473931 0.7096509) translation=(0.0075 -0.0407 -0.0061)
          quadrant=all radius=0.004 length=0.01
    Body LA6M2: mass=0 mass_center=(0 0 0) inertia=(0 0 0 0 0 0) meshes=2midph_l.vtp
      WrapCylinder LA_Secondmd: xyz_body_rotation=(-0.501782 1.41302 0.647343)
          translation=(0.00171552 -0.0115798 -0.00014296) quadrant=x radius=0.001429602 length=0.00476534
    Body LA7D2: mass=0 mass_center=(0 0 0) inertia=(0 0 0 0 0 0) meshes=2distph_l.vtp
    Body LA5P3: mass=0 mass_center=(0 0 0) inertia=(0 0 0 0 0 0) meshes=3proxph_l.vtp
    Body LA6M3: mass=0 mass_center=(0 0 0) inertia=(0 0 0 0 0 0) meshes=3midph_l.vtp
    Body LA7D3: mass=0 mass_center=(0 0 0) inertia=(0 0 0 0 0 0) meshes=3distph_l.vtp
    Body LA5P4: mass=0 mass_center=(0 0 0) inertia=(0 0 0 0 0 0) meshes=4proxph_l.vtp
    Body LA6M4: mass=0 mass_center=(0 0 0) inertia=(0 0 0 0 0 0) meshes=4midph_l.vtp
    Body LA7D4: mass=0 mass_center=(0 0 0) inertia=(0 0 0 0 0 0) meshes=4distph_l.vtp
    Body LA5P5: mass=0 mass_center=(0 0 0) inertia=(0 0 0 0 0 0) meshes=5proxph_l.vtp
    Body LA6M5: mass=0 mass_center=(0 0 0) inertia=(0 0 0 0 0 0) meshes=5midph_l.vtp
    Body LA7D5: mass=0 mass_center=(0 0 0) inertia=(0 0 0 0 0 0) meshes=5distph_l.vtp
  JointSet:
    CustomJoint ground_Thorax: socket_parent_frame=ground_offset socket_child_frame=Thorax_offset
      Coordinate Thorax_rot1: default_value=0 range=(-1.5708 1.5708) clamped=true locked=true
      Coordinate Thorax_rot2: default_value=0 range=(-1.5708 1.5708) clamped=true locked=true
      Coordinate Thorax_rot3: default_value=0 range=(-1.5708 1.5708) clamped=true locked=true
      Coordinate Thorax_tra1: default_value=0 range=(-3 3) clamped=true
      Coordinate Thorax_tra2: default_value=0 range=(-3 3) clamped=true
      Coordinate Thorax_tra3: default_value=0 range=(-3 3) clamped=true
      PhysicalOffsetFrame ground_offset: socket_parent=/ground translation=(0 0 0) [meters]
      PhysicalOffsetFrame Thorax_offset: socket_parent=/bodyset/Thorax translation=(0 0 0)
      SpatialTransform:
        TransformAxis rotation1: coordinates=Thorax_rot1 axis=(0 0 1) LinearFunction(coefficients=1 0)
        TransformAxis rotation2: coordinates=Thorax_rot2 axis=(0 1 0) LinearFunction(coefficients=1 0)
        TransformAxis rotation3: coordinates=Thorax_rot3 axis=(1 0 0) LinearFunction(coefficients=1 0)
        TransformAxis translation1: coordinates=Thorax_tra1 axis=(1 0 0) LinearFunction(coefficients=1 0)
        TransformAxis translation2: coordinates=Thorax_tra2 axis=(0 1 0) LinearFunction(coefficients=1 0)
        TransformAxis translation3: coordinates=Thorax_tra3 axis=(0 0 1) LinearFunction(coefficients=1 0)
    CustomJoint LA_sternoclavicular: socket_parent_frame=Thorax_offset socket_child_frame=LA_clavicle_offset
      Coordinate la_sternoclavicular_r2_d: default_value=0 range=(-99999.9 99999.9) clamped=false
      Coordinate la_sternoclavicular_r3_d: default_value=0 range=(-99999.9 99999.9) clamped=false
      PhysicalOffsetFrame Thorax_offset: socket_parent=/bodyset/Thorax translation=(0.006325 0.00693 -0.025465)
      PhysicalOffsetFrame LA_clavicle_offset: socket_parent=/bodyset/LA_clavicle translation=(0 0 0)
      SpatialTransform: axes_held_at_zero=(rotation3 translation1 translation2 translation3)
        TransformAxis rotation1: coordinates=la_sternoclavicular_r2_d axis=(-0.0153 -0.9892987 -0.1451)
            LinearFunction(coefficients=1 0)
        TransformAxis rotation2: coordinates=la_sternoclavicular_r3_d axis=(0.9944725 0 -0.104997)
            LinearFunction(coefficients=1 0)
    CustomJoint LA_unrotscap: socket_parent_frame=LA_clavicle_offset socket_child_frame=LA_clavphant_offset
      Coordinate la_unrotscap_r3_d: default_value=0 range=(-99999.9 99999.9) clamped=true
      Coordinate la_unrotscap_r2_d: default_value=0 range=(-99999.9 99999.9) clamped=true
      PhysicalOffsetFrame LA_clavicle_offset: socket_parent=/bodyset/LA_clavicle
          translation=(-0.01433 0.02007 -0.135535)
      PhysicalOffsetFrame LA_clavphant_offset: socket_parent=/bodyset/LA_clavphant translation=(0 0 0)
      SpatialTransform: axes_held_at_zero=(rotation3 translation1 translation2 translation3)
        TransformAxis rotation1: coordinates=la_unrotscap_r3_d axis=(0.9944725 0 -0.104997)
            LinearFunction(coefficients=1 0)
        TransformAxis rotation2: coordinates=la_unrotscap_r2_d axis=(-0.0153 -0.9892987 -0.1451)
            LinearFunction(coefficients=1 0)
    CustomJoint LA_acromioclavicular: socket_parent_frame=LA_clavphant_offset socket_child_frame=LA_scapula_offset
      Coordinate la_acromioclavicular_r2_d: default_value=0 range=(-99999.9 99999.9) clamped=true
      Coordinate la_acromioclavicular_r3_d: default_value=0 range=(-99999.9 99999.9) clamped=true
      Coordinate la_acromioclavicular_r1_d: default_value=0 range=(-99999.9 99999.9) clamped=true
      PhysicalOffsetFrame LA_clavphant_offset: socket_parent=/bodyset/LA_clavphant translation=(0 0 0)
      PhysicalOffsetFrame LA_scapula_offset: socket_parent=/bodyset/LA_scapula translation=(0 0 0)
      SpatialTransform: axes_held_at_zero=(translation1 translation2 translation3)
        TransformAxis rotation1: coordinates=la_acromioclavicular_r2_d axis=(-0.1570949 -0.9472686 -0.2792909)
            LinearFunction(coefficients=1 0)
        TransformAxis rotation2: coordinates=la_acromioclavicular_r3_d axis=(0.754084 -0.297594 0.585487)
            LinearFunction(coefficients=1 0)
        TransformAxis rotation3: coordinates=la_acromioclavicular_r1_d axis=(-0.6376999 -0.1186 0.7610998)
            LinearFunction(coefficients=1 0)
    CustomJoint LA_unrothum: socket_parent_frame=LA_scapula_offset socket_child_frame=LA_scapphant_offset
      Coordinate la_unrothum_r1_d: default_value=0 range=(-99999.9 99999.9) clamped=false
      Coordinate la_unrothum_r3_d: default_value=0 range=(-99999.9 99999.9) clamped=false
      Coordinate la_unrothum_r2_d: default_value=0 range=(-99999.9 99999.9) clamped=false
      PhysicalOffsetFrame LA_scapula_offset: socket_parent=/bodyset/LA_scapula translation=(-0.00955 -0.034 -0.009)
      PhysicalOffsetFrame LA_scapphant_offset: socket_parent=/bodyset/LA_scapphant translation=(0 0 0)
      SpatialTransform: axes_held_at_zero=(translation1 translation2 translation3)
        TransformAxis rotation1: coordinates=la_unrothum_r1_d axis=(-0.6376999 -0.1186 0.7610998)
            LinearFunction(coefficients=1 0)
        TransformAxis rotation2: coordinates=la_unrothum_r3_d axis=(0.754084 -0.297594 0.585487)
            LinearFunction(coefficients=1 0)
        TransformAxis rotation3: coordinates=la_unrothum_r2_d axis=(-0.1570949 -0.9472686 -0.2792909)
            LinearFunction(coefficients=1 0)
    CustomJoint LA_shoulder0: socket_parent_frame=LA_scapphant_offset socket_child_frame=LA1H_PHANT_offset
      Coordinate la_sh_elv_angle: default_value=0 range=(-1.570796 2.268928) clamped=true
      PhysicalOffsetFrame LA_scapphant_offset: socket_parent=/bodyset/LA_scapphant translation=(0 0 0)
      PhysicalOffsetFrame LA1H_PHANT_offset: socket_parent=/bodyset/LA1H_PHANT translation=(0 0 0)
      SpatialTransform: axes_held_at_zero=(rotation2 rotation3 translation1 translation2 translation3)
        TransformAxis rotation1: coordinates=la_sh_elv_angle axis=(-0.004800001 -0.9990892 0.04240001)
            LinearFunction(coefficients=1 0)
    CustomJoint LA_shoulder1: socket_parent_frame=LA1H_PHANT_offset socket_child_frame=LA1H_PHANT1_offset
      Coordinate la_sh_elv: default_value=0 range=(0 3.141593) clamped=true
      Coordinate la_shoulder1_r2_d: default_value=0 range=(-99999.9 99999.9) clamped=false
      PhysicalOffsetFrame LA1H_PHANT_offset: socket_parent=/bodyset/LA1H_PHANT translation=(0 0 0)
      PhysicalOffsetFrame LA1H_PHANT1_offset: socket_parent=/bodyset/LA1H_PHANT1 translation=(0 0 0)
      SpatialTransform: axes_held_at_zero=(rotation3 translation1 translation2 translation3)
        TransformAxis rotation1: coordinates=la_sh_elv axis=(0.9982614 -0.002300001 0.05889802)
            LinearFunction(coefficients=1 0)
        TransformAxis rotation2: coordinates=la_shoulder1_r2_d axis=(-0.004800001 -0.9990892 0.04240001)
            LinearFunction(coefficients=1 0)
    CustomJoint LA_shoulder2: socket_parent_frame=LA1H_PHANT1_offset socket_child_frame=LA1H_offset
      Coordinate la_sh_rot: default_value=0 range=(-1.570796 0.3490659) clamped=true
      PhysicalOffsetFrame LA1H_PHANT1_offset: socket_parent=/bodyset/LA1H_PHANT1 translation=(0 0 0)
      PhysicalOffsetFrame LA1H_offset: socket_parent=/bodyset/LA1H translation=(0 0 0)
      SpatialTransform: axes_held_at_zero=(rotation2 rotation3 translation1 translation2 translation3)
        TransformAxis rotation1: coordinates=la_sh_rot axis=(-0.004800001 -0.9990892 0.04240001)
            LinearFunction(coefficients=1 0)
    CustomJoint LA1H_LA2U: socket_parent_frame=LA1H_offset socket_child_frame=LA2U_offset
      Coordinate la_el_e_f: default_value=0 range=(0 2.268928) clamped=true
      PhysicalOffsetFrame LA1H_offset: socket_parent=/bodyset/LA1H translation=(0.0061 -0.2904 0.0123)
      PhysicalOffsetFrame LA2U_offset: socket_parent=/bodyset/LA2U translation=(0 0 0)
      SpatialTransform: axes_held_at_zero=(rotation2 rotation3 translation1 translation2 translation3)
        TransformAxis rotation1: coordinates=la_el_e_f axis=(-0.04940001 -0.03660001 0.9981082)
            LinearFunction(coefficients=1 0)
    CustomJoint LA2U_LA2R: socket_parent_frame=LA2U_offset socket_child_frame=LA2R_offset
      Coordinate la_wr_sup_pro: default_value=0 range=(-1.570796 1.570796) clamped=true
      PhysicalOffsetFrame LA2U_offset: socket_parent=/bodyset/LA2U translation=(0.0004 -0.011503 -0.019999)
      PhysicalOffsetFrame LA2R_offset: socket_parent=/bodyset/LA2R translation=(0 0 0)
      SpatialTransform: axes_held_at_zero=(rotation2 rotation3 translation1 translation2 translation3)
        TransformAxis rotation1: coordinates=la_wr_sup_pro axis=(0.01716099 -0.9926656 -0.119668)
            LinearFunction(coefficients=1 0)
    CustomJoint LA2R_LA3L: socket_parent_frame=LA2R_offset socket_child_frame=LA3L_offset
      Coordinate la_wr_rd_ud: default_value=0 range=(-0.1745329 0.4363323) clamped=true
      Coordinate la_wr_e_f: default_value=0 range=(-1.22173 1.22173) clamped=true
      PhysicalOffsetFrame LA2R_offset: socket_parent=/bodyset/LA2R translation=(0.018 -0.242 -0.025)
      PhysicalOffsetFrame LA3L_offset: socket_parent=/bodyset/LA3L translation=(0 0 0)
      SpatialTransform: axes_held_at_zero=(rotation3 translation1 translation2 translation3)
        TransformAxis rotation1: coordinates=la_wr_rd_ud axis=(0.819064 0.135611 -0.557444)
          SimmSpline: x=(-0.174533 0 0.436332) y=(-0.174533 0 0.436332)
        TransformAxis rotation2: coordinates=la_wr_e_f axis=(-0.9564267 0.2522069 0.147104)
          SimmSpline: x=(-1.5708 1.5708) y=(-0.785398 0.785398)
    WeldJoint LA3L_LA3S_W: socket_parent_frame=LA3L_offset socket_child_frame=LA3S_offset
      PhysicalOffsetFrame LA3L_offset: socket_parent=/bodyset/LA3L translation=(0.012345 -0.004464 0.001254)
      PhysicalOffsetFrame LA3S_offset: socket_parent=/bodyset/LA3S translation=(0 0 0)
    WeldJoint LA3S_LA3P_W: socket_parent_frame=LA3L_offset socket_child_frame=LA3P_offset
      PhysicalOffsetFrame LA3L_offset: socket_parent=/bodyset/LA3L translation=(-0.013388 -0.009886 0.010593)
      PhysicalOffsetFrame LA3P_offset: socket_parent=/bodyset/LA3P translation=(0 0 0)
    WeldJoint LA3L_LA3Q_W: socket_parent_frame=LA3L_offset socket_child_frame=LA3Q_offset
      PhysicalOffsetFrame LA3L_offset: socket_parent=/bodyset/LA3L translation=(-0.010784 -0.007499 0.001289)
      PhysicalOffsetFrame LA3Q_offset: socket_parent=/bodyset/LA3Q translation=(0 0 0)
    CustomJoint LA3L_LA3C: socket_parent_frame=LA3L_offset socket_child_frame=LA3C_offset
      Coordinate la_proximal_distal_r1_d: default_value=0 range=(-99999.9 99999.9) clamped=false
      Coordinate la_proximal_distal_r3_d: default_value=0 range=(-99999.9 99999.9) clamped=false
      PhysicalOffsetFrame LA3L_offset: socket_parent=/bodyset/LA3L translation=(0.003992 -0.015054 -0.002327)
      PhysicalOffsetFrame LA3C_offset: socket_parent=/bodyset/LA3C translation=(0 0 0)
      SpatialTransform: axes_held_at_zero=(rotation3 translation1 translation2 translation3)
        TransformAxis rotation1: coordinates=la_proximal_distal_r1_d axis=(-0.8991357 0.3490529 -0.2640399)
            LinearFunction(coefficients=1 0)
        TransformAxis rotation2: coordinates=la_proximal_distal_r3_d axis=(-0.9971185 -0.01069999 -0.07510096)
            LinearFunction(coefficients=1 0)
    WeldJoint LA3C_LA3T_W: socket_parent_frame=LA3C_offset socket_child_frame=LA3T_offset
      PhysicalOffsetFrame LA3C_offset: socket_parent=/bodyset/LA3C translation=(0.015293 -0.004569 0.010308)
      PhysicalOffsetFrame LA3T_offset: socket_parent=/bodyset/LA3T translation=(0 0 0)
    WeldJoint LA3C_LA3O_W: socket_parent_frame=LA3C_offset socket_child_frame=LA3O_offset
      PhysicalOffsetFrame LA3C_offset: socket_parent=/bodyset/LA3C translation=(0.009143 -0.004062 0.002464)
      PhysicalOffsetFrame LA3O_offset: socket_parent=/bodyset/LA3O translation=(0 0 0)
    WeldJoint LA3C_LA3H_W: socket_parent_frame=LA3C_offset socket_child_frame=LA3H_offset
      PhysicalOffsetFrame LA3C_offset: socket_parent=/bodyset/LA3C translation=(-0.010969 -0.002495 0.00075)
      PhysicalOffsetFrame LA3H_offset: socket_parent=/bodyset/LA3H translation=(0 0 0)
    CustomJoint LA3T_LA4M1_PHANT: socket_parent_frame=LA3T_offset socket_child_frame=LA4M1_PHANT_offset
      Coordinate la_cmc1_f_e: default_value=0 range=(-0.2617994 0.7853982) clamped=true
      Coordinate la_cmc1_opp: default_value=0 range=(-0.7853982 0.7853982) clamped=true
      PhysicalOffsetFrame LA3T_offset: socket_parent=/bodyset/LA3T translation=(0 0 0)
      PhysicalOffsetFrame LA4M1_PHANT_offset: socket_parent=/bodyset/LA4M1_PHANT translation=(0 0 0)
      SpatialTransform: axes_held_at_zero=(rotation3 translation1 translation2 translation3)
        TransformAxis rotation1: coordinates=la_cmc1_f_e axis=(0.04239899 0.6652859 0.7453838)
            LinearFunction(coefficients=1 0)
        TransformAxis rotation2: coordinates=la_cmc1_opp axis=(0.6666976 -0.6189287 0.4152607)
            LinearFunction(coefficients=1 0)
    CustomJoint LA4M1_PHANT_LA4M1: socket_parent_frame=LA4M1_PHANT_offset socket_child_frame=LA4M1_offset
      Coordinate la_cmc1_ad_ab: default_value=0 range=(-0.4363323 0.4363323) clamped=true
      PhysicalOffsetFrame LA4M1_PHANT_offset: socket_parent=/bodyset/LA4M1_PHANT translation=(0.0072 -0.0054 0.0025)
      PhysicalOffsetFrame LA4M1_offset: socket_parent=/bodyset/LA4M1 translation=(0 0 0)
      SpatialTransform: axes_held_at_zero=(rotation2 rotation3 translation1 translation2 translation3)
        TransformAxis rotation1: coordinates=la_cmc1_ad_ab axis=(-0.495557 -0.731736 0.467959)
            LinearFunction(coefficients=1 0)
    WeldJoint LA3C_LA4M2_W: socket_parent_frame=LA3C_offset socket_child_frame=LA4M2_offset
      PhysicalOffsetFrame LA3C_offset: socket_parent=/bodyset/LA3C translation=(0.014685 -0.03762 -0.005032)
      PhysicalOffsetFrame LA4M2_offset: socket_parent=/bodyset/LA4M2 translation=(0 0 0)
    WeldJoint LA3C_LA4M3_W: socket_parent_frame=LA3C_offset socket_child_frame=LA4M3_offset
      PhysicalOffsetFrame LA3C_offset: socket_parent=/bodyset/LA3C translation=(0.000477 -0.039239 -0.007377)
      PhysicalOffsetFrame LA4M3_offset: socket_parent=/bodyset/LA4M3 translation=(0 0 0)
    WeldJoint LA3C_LA4M4_W: socket_parent_frame=LA3C_offset socket_child_frame=LA4M4_offset
      PhysicalOffsetFrame LA3C_offset: socket_parent=/bodyset/LA3C translation=(-0.012046 -0.040519 -0.003513)
      PhysicalOffsetFrame LA4M4_offset: socket_parent=/bodyset/LA4M4 translation=(0 0 0)
    WeldJoint LA3C_LA4M5_W: socket_parent_frame=LA3C_offset socket_child_frame=LA4M5_offset
      PhysicalOffsetFrame LA3C_offset: socket_parent=/bodyset/LA3C translation=(-0.021896 -0.034683 0.004218)
      PhysicalOffsetFrame LA4M5_offset: socket_parent=/bodyset/LA4M5 translation=(0 0 0)
    CustomJoint LA4M1_LA5P1: socket_parent_frame=LA4M1_offset socket_child_frame=LA5P1_offset
      Coordinate la_mcp1_e_f: default_value=0 range=(-0.5235988 0.6981317) clamped=true
      PhysicalOffsetFrame LA4M1_offset: socket_parent=/bodyset/LA4M1 translation=(0.0165 -0.0292 0.0127)
      PhysicalOffsetFrame LA5P1_offset: socket_parent=/bodyset/LA5P1 translation=(0 0 0)
      SpatialTransform: axes_held_at_zero=(rotation2 rotation3 translation1 translation2 translation3)
        TransformAxis rotation1: coordinates=la_mcp1_e_f axis=(0 -0.2 -1) LinearFunction(coefficients=1 0)
    CustomJoint LA5P1_LA6D1: socket_parent_frame=LA5P1_offset socket_child_frame=LA6D1_offset
      Coordinate la_ip1_e_f: default_value=0 range=(-1.308997 1.308997) clamped=true
      PhysicalOffsetFrame LA5P1_offset: socket_parent=/bodyset/LA5P1 translation=(0.014 -0.0259 0.0101)
      PhysicalOffsetFrame LA6D1_offset: socket_parent=/bodyset/LA6D1 translation=(0 0 0)
      SpatialTransform: axes_held_at_zero=(rotation2 rotation3 translation1 translation2 translation3)
        TransformAxis rotation1: coordinates=la_ip1_e_f axis=(-0.05010201 -0.4796231 -0.8760431)
            LinearFunction(coefficients=1 0)
    CustomJoint LA4M2_LA5P2: socket_parent_frame=LA4M2_offset socket_child_frame=LA5P2_offset
      Coordinate la_mcp2_e_f: default_value=0 range=(-0.8726646 1.570796) clamped=true
      Coordinate la_mcp2_ad_ab: default_value=0 range=(-0.2617994 0.5217994) clamped=true
      PhysicalOffsetFrame LA4M2_offset: socket_parent=/bodyset/LA4M2 translation=(0.003501 -0.028243 -0.00362)
          orientation=(-2.97153 0.173733 1.59226) [radians]
      PhysicalOffsetFrame LA5P2_offset: socket_parent=/bodyset/LA5P2 translation=(0 0 0)
          orientation=(-2.97153 0.173733 1.59226)
      SpatialTransform: axes_held_at_zero=(rotation3 translation1 translation2 translation3)
        TransformAxis rotation1: coordinates=la_mcp2_e_f axis=(0 1 0) LinearFunction(coefficients=1 0)
        TransformAxis rotation2: coordinates=la_mcp2_ad_ab axis=(0 0 -1) LinearFunction(coefficients=1 0)
    CustomJoint LA5P2_LA6M2: socket_parent_frame=LA5P2_offset socket_child_frame=LA6M2_offset
      Coordinate la_pip2_e_f: default_value=0 range=(0 2.094395) clamped=true
      PhysicalOffsetFrame LA5P2_offset: socket_parent=/bodyset/LA5P2 translation=(0.007517 -0.041273 -0.007326)
          orientation=(-0.869684 1.4208 2.3312)
      PhysicalOffsetFrame LA6M2_offset: socket_parent=/bodyset/LA6M2 translation=(0 0 0)
          orientation=(-0.869684 1.4208 2.3312)
      SpatialTransform: axes_held_at_zero=(rotation2 rotation3 translation1 translation2 translation3)
        TransformAxis rotation1: coordinates=la_pip2_e_f axis=(-0.1 0 -1) LinearFunction(coefficients=1 0)
    CustomJoint LA6M2_LA7D2: socket_parent_frame=LA6M2_offset socket_child_frame=LA7D2_offset
      Coordinate la_dip2_e_f: default_value=0 range=(-0.5235988 1.570796) clamped=true
      PhysicalOffsetFrame LA6M2_offset: socket_parent=/bodyset/LA6M2 translation=(0.003333 -0.024888 -0.00122)
          orientation=(-0.326422 0.0790475 2.03982)
      PhysicalOffsetFrame LA7D2_offset: socket_parent=/bodyset/LA7D2 translation=(0 0 0)
          orientation=(-0.326422 0.0790475 2.03982)
      SpatialTransform: axes_held_at_zero=(rotation2 rotation3 translation1 translation2 translation3)
        TransformAxis rotation1: coordinates=la_dip2_e_f axis=(0.4 1 -0.2) LinearFunction(coefficients=1 0)
    CustomJoint LA4M3_LA5P3: socket_parent_frame=LA4M3_offset socket_child_frame=LA5P3_offset
      Coordinate la_mcp3_e_f: default_value=0 range=(-0.8726646 1.570796) clamped=true
      Coordinate la_mcp3_rd_ud: default_value=0 range=(-0.2617994 0.2617994) clamped=true
      PhysicalOffsetFrame LA4M3_offset: socket_parent=/bodyset/LA4M3 translation=(0.00024 -0.02629 -0.001778)
      PhysicalOffsetFrame LA5P3_offset: socket_parent=/bodyset/LA5P3 translation=(0 0 0)
      SpatialTransform: axes_held_at_zero=(rotation3 translation1 translation2 translation3)
        TransformAxis rotation1: coordinates=la_mcp3_e_f axis=(-1 0 0) LinearFunction(coefficients=1 0)
        TransformAxis rotation2: coordinates=la_mcp3_rd_ud axis=(0 0.5 -1) LinearFunction(coefficients=1 0)
    CustomJoint LA5P3_LA6M3: socket_parent_frame=LA5P3_offset socket_child_frame=LA6M3_offset
      Coordinate la_pip3_e_f: default_value=0 range=(0 2.094395) clamped=true
      PhysicalOffsetFrame LA5P3_offset: socket_parent=/bodyset/LA5P3 translation=(0.00165 -0.044211 -0.00623)
      PhysicalOffsetFrame LA6M3_offset: socket_parent=/bodyset/LA6M3 translation=(0 0 0)
      SpatialTransform: axes_held_at_zero=(rotation2 rotation3 translation1 translation2 translation3)
        TransformAxis rotation1: coordinates=la_pip3_e_f axis=(-1 0 0) LinearFunction(coefficients=1 0)
    CustomJoint LA6M3_LA7D3: socket_parent_frame=LA6M3_offset socket_child_frame=LA7D3_offset
      Coordinate la_dip3_e_f: default_value=0 range=(-0.5235988 1.570796) clamped=true
      PhysicalOffsetFrame LA6M3_offset: socket_parent=/bodyset/LA6M3 translation=(0.001365 -0.029047 -0.001954)
      PhysicalOffsetFrame LA7D3_offset: socket_parent=/bodyset/LA7D3 translation=(0 0 0)
      SpatialTransform: axes_held_at_zero=(rotation2 rotation3 translation1 translation2 translation3)
        TransformAxis rotation1: coordinates=la_dip3_e_f axis=(-1 -0.1 0) LinearFunction(coefficients=1 0)
    CustomJoint LA4M4_LA5P4: socket_parent_frame=LA4M4_offset socket_child_frame=LA5P4_offset
      Coordinate la_mcp4_e_f: default_value=0 range=(-0.8726646 1.570796) clamped=true
      Coordinate la_mcp4_ad_ab: default_value=0 range=(-0.2617994 0.2617994) clamped=true
      PhysicalOffsetFrame LA4M4_offset: socket_parent=/bodyset/LA4M4 translation=(-0.00183 -0.023689 0.000173)
      PhysicalOffsetFrame LA5P4_offset: socket_parent=/bodyset/LA5P4 translation=(0 0 0)
      SpatialTransform: axes_held_at_zero=(rotation3 translation1 translation2 translation3)
        TransformAxis rotation1: coordinates=la_mcp4_e_f axis=(-1 0.05 0.1) LinearFunction(coefficients=1 0)
        TransformAxis rotation2: coordinates=la_mcp4_ad_ab axis=(-0.1 0.7 -1) LinearFunction(coefficients=1 0)
    CustomJoint LA5P4_LA6M4: socket_parent_frame=LA5P4_offset socket_child_frame=LA6M4_offset
      Coordinate la_pip4_e_f: default_value=0 range=(0 2.094395) clamped=true
      PhysicalOffsetFrame LA5P4_offset: socket_parent=/bodyset/LA5P4 translation=(-0.003528 -0.040255 -0.001345)
          orientation=(3.14059 0.0151074 -3.0091)
      PhysicalOffsetFrame LA6M4_offset: socket_parent=/bodyset/LA6M4 translation=(0 0 0)
          orientation=(3.14059 0.0151074 -3.0091)
      SpatialTransform: axes_held_at_zero=(rotation2 rotation3 translation1 translation2 translation3)
        TransformAxis rotation1: coordinates=la_pip4_e_f axis=(1 -0.2 -0.4) LinearFunction(coefficients=1 0)
    CustomJoint LA6M4_LA7D4: socket_parent_frame=LA6M4_offset socket_child_frame=LA7D4_offset
      Coordinate la_dip4_e_f: default_value=0 range=(-0.5236 1.570796) clamped=true
      PhysicalOffsetFrame LA6M4_offset: socket_parent=/bodyset/LA6M4 translation=(-0.002317 -0.024789 -0.000563)
          orientation=(-3.13802 -0.0382843 -2.95545)
      PhysicalOffsetFrame LA7D4_offset: socket_parent=/bodyset/LA7D4 translation=(0 0 0)
          orientation=(-3.13802 -0.0382843 -2.95545)
      SpatialTransform: axes_held_at_zero=(rotation2 rotation3 translation1 translation2 translation3)
        TransformAxis rotation1: coordinates=la_dip4_e_f axis=(1 -0.1 -0.5) LinearFunction(coefficients=1 0)
    CustomJoint LA4M5_LA5P5: socket_parent_frame=LA4M5_offset socket_child_frame=LA5P5_offset
      Coordinate la_mcp5_e_f: default_value=0 range=(-0.8726646 1.570796) clamped=true
      Coordinate la_mcp5_ad_ab: default_value=0 range=(-0.2617994 0.5217994) clamped=true
      PhysicalOffsetFrame LA4M5_offset: socket_parent=/bodyset/LA4M5 translation=(-0.001597 -0.021431 0.001496)
          orientation=(-2.97153 0.173733 1.59226)
      PhysicalOffsetFrame LA5P5_offset: socket_parent=/bodyset/LA5P5 translation=(0 0 0)
          orientation=(-2.97153 0.173733 1.59226)
      SpatialTransform: axes_held_at_zero=(rotation3 translation1 translation2 translation3)
        TransformAxis rotation1: coordinates=la_mcp5_e_f axis=(-0.1 1 -0.7) LinearFunction(coefficients=1 0)
        TransformAxis rotation2: coordinates=la_mcp5_ad_ab axis=(0 0.7 1) LinearFunction(coefficients=1 0)
    CustomJoint LA5P5_LA6M5: socket_parent_frame=LA5P5_offset socket_child_frame=LA6M5_offset
      Coordinate la_pip5_e_f: default_value=0 range=(0 2.094395) clamped=true
      PhysicalOffsetFrame LA5P5_offset: socket_parent=/bodyset/LA5P5 translation=(-0.005279 -0.035563 0.002879)
      PhysicalOffsetFrame LA6M5_offset: socket_parent=/bodyset/LA6M5 translation=(0 0 0)
      SpatialTransform: axes_held_at_zero=(rotation2 rotation3 translation1 translation2 translation3)
        TransformAxis rotation1: coordinates=la_pip5_e_f axis=(-1 0.2 0.6) LinearFunction(coefficients=1 0)
    CustomJoint LA6M5_LA7D5: socket_parent_frame=LA6M5_offset socket_child_frame=LA7D5_offset
      Coordinate la_dip5_e_f: default_value=0 range=(-0.5236 1.570796) clamped=true
      PhysicalOffsetFrame LA6M5_offset: socket_parent=/bodyset/LA6M5 translation=(-0.002871 -0.020677 0.002243)
      PhysicalOffsetFrame LA7D5_offset: socket_parent=/bodyset/LA7D5 translation=(0 0 0)
      SpatialTransform: axes_held_at_zero=(rotation2 rotation3 translation1 translation2 translation3)
        TransformAxis rotation1: coordinates=la_dip5_e_f axis=(-1 0.2 0.9) LinearFunction(coefficients=1 0)
  ConstraintSet:
    CoordinateCouplerConstraint [values shared by the 13 below unless stated]: independent_coordinate_names=la_sh_elv
    CoordinateCouplerConstraint la_sternoclavicular_r2_con: dependent_coordinate_name=la_sternoclavicular_r2_d
      coupled_coordinates_function: SimmSpline LA_f0: x=(0 2.61799) y=(0 -0.633555)
    CoordinateCouplerConstraint la_sternoclavicular_r3_con: dependent_coordinate_name=la_sternoclavicular_r3_d
      coupled_coordinates_function: SimmSpline LA_f1: x=(0 3.14159) y=(0 0.322013)
    CoordinateCouplerConstraint la_unrotscap_r2_con: dependent_coordinate_name=la_unrotscap_r2_d
      coupled_coordinates_function: SimmSpline LA_f2: x=(0 2.61799) y=(0 0.633555)
    CoordinateCouplerConstraint la_unrotscap_r3_con: dependent_coordinate_name=la_unrotscap_r3_d
      coupled_coordinates_function: SimmSpline LA_f3: x=(0 3.14159) y=(0 -0.322013)
    CoordinateCouplerConstraint la_acromioclavicular_r1_con: dependent_coordinate_name=la_acromioclavicular_r1_d
      coupled_coordinates_function: SimmSpline LA_f4: x=(0 2.61799) y=(0 0.466003)
    CoordinateCouplerConstraint la_acromioclavicular_r2_con: dependent_coordinate_name=la_acromioclavicular_r2_d
      coupled_coordinates_function: SimmSpline LA_f5: x=(0 2.61799) y=(0 -0.128282)
    CoordinateCouplerConstraint la_acromioclavicular_r3_con: dependent_coordinate_name=la_acromioclavicular_r3_d
      coupled_coordinates_function: SimmSpline LA_f6: x=(0 2.61799) y=(0 1.03673)
    CoordinateCouplerConstraint la_unrothum_r1_con: dependent_coordinate_name=la_unrothum_r1_d
      coupled_coordinates_function: SimmSpline LA_f7: x=(0 2.61799) y=(0 -0.466003)
    CoordinateCouplerConstraint la_unrothum_r2_con: dependent_coordinate_name=la_unrothum_r2_d
      coupled_coordinates_function: SimmSpline LA_f8: x=(0 2.61799) y=(0 0.128282)
    CoordinateCouplerConstraint la_unrothum_r3_con: dependent_coordinate_name=la_unrothum_r3_d
      coupled_coordinates_function: SimmSpline LA_f9: x=(0 2.61799) y=(0 -1.03673)
    CoordinateCouplerConstraint la_shoulder1_r2_con: independent_coordinate_names=la_sh_elv_angle
        dependent_coordinate_name=la_shoulder1_r2_d
      coupled_coordinates_function: SimmSpline LA_f11: x=(-1.5708 3.14159) y=(1.5708 -3.14159)
    CoordinateCouplerConstraint la_proximal_distal_r1_con: independent_coordinate_names=la_wr_rd_ud
        dependent_coordinate_name=la_proximal_distal_r1_d
      coupled_coordinates_function: SimmSpline LA_f18: x=(-0.174533 0 0.436332) y=(-0.261799 0 0.436332)
    CoordinateCouplerConstraint la_proximal_distal_r3_con: independent_coordinate_names=la_wr_e_f
        dependent_coordinate_name=la_proximal_distal_r3_d
      coupled_coordinates_function: SimmSpline LA_f19: x=(-1.22173 1.22173) y=(-0.610865 0.610865)
